*Heading
** Job name: SingleElementRef Model name: Model-1
** Generated by: Abaqus/CAE 2023
*Preprint, echo=NO, model=NO, history=NO, contact=NO
**
** PARTS
**
*Part, name=Part-1
*Node
      1,            0.,           0.
      2,            0.,           1.
      3,            1.,           1.
      4,            1.,           0.
*Element, type=CPS4
1, 1, 4, 3, 2 *counterclockwise selection
*Nset, nset=_PickedSet2, internal, generate
 1,  4,  1
*Elset, elset=_PickedSet2, internal
 1,
** Section: Section-1
*Solid Section, elset=_PickedSet2, material=Material-1
,
*End Part
**
**
** ASSEMBLY
**
*Assembly, name=Assembly
**
*Instance, name=Part-1-1, part=Part-1
*End Instance
**
*Nset, nset=Set-1, instance=Part-1-1, generate
 1,  4,  1
*Nset, nset=_PickedSet5, internal, instance=Part-1-1
 1, 2
*Elset, elset=_PickedSet5, internal, instance=Part-1-1
 1,
*Nset, nset=_PickedSet6, internal, instance=Part-1-1
 3, 4
*Elset, elset=_PickedSet6, internal, instance=Part-1-1
 1,
*End Assembly
**
** MATERIALS
**
*Material, name=Material-1
*Elastic
 2e+09, 0.3
** ----------------------------------------------------------------
**
** STEP: Step-1
**
*Step, name=Step-1, nlgeom=NO
*Static
1., 1., 1e-05, 1.
**
** BOUNDARY CONDITIONS
**
** Name: BC-1 Type: Symmetry/Antisymmetry/Encastre
*Boundary
_PickedSet5, ENCASTRE
** Name: BC-2 Type: Displacement/Rotation
*Boundary
_PickedSet6, 1, 1, 0.01
**
** OUTPUT REQUESTS
**
*Restart, write, frequency=0
**
** FIELD OUTPUT: F-Output-1
**
*Output, field, variable=PRESELECT
**
** HISTORY OUTPUT: H-Output-2
**
*Output, history
*Node Output, nset=Set-1
RF1, RF2, U1, U2
**
** HISTORY OUTPUT: H-Output-1
**
*Output, history, variable=PRESELECT
*End Step
